# OpenSim document version 30000
AnalyzeTool task:
  model_file: ../residual_reduction_algorithm/model_adjusted.osim
  replace_force_set: true
  force_set_files: muscle_set.xml
  results_directory: .
  output_precision: 8
  initial_time: -infinity
  final_time: infinity
  solve_for_equilibrium_for_auxiliary_states: true
  maximum_number_of_integrator_steps: 20000
  maximum_integrator_step_size: 1
  minimum_integrator_step_size: 1e-8
  integrator_error_tolerance: 1e-5
  coordinates_file: ../inverse_kinematics/task_InverseKinematics.mot
  lowpass_cutoff_frequency_for_coordinates: -1
  AnalysisSet Analyses:
    MuscleAnalysis: start_time=-infinity end_time=infinity step_interval=1 in_degrees=false muscle_list=all
        compute_moments=false
