# OpenSim document version 30000
# Markers and coordinates to be considered (tasks) and their
# weightings. The sum of weighted-squared task errors composes
# the cost function.
IKTaskSet:
  IKMarkerTask STRN: apply=true weight=1
  IKMarkerTask RSHO: apply=true weight=1
  IKMarkerTask LSHO: apply=true weight=1
  IKMarkerTask RASI: apply=true weight=1
  IKMarkerTask LASI: apply=true weight=1
  IKMarkerTask RTHI: apply=true weight=1
  IKMarkerTask RKNE: apply=true weight=1
  IKMarkerTask RTIB: apply=true weight=1
  IKMarkerTask RANK: apply=true weight=1
  IKMarkerTask RHEE: apply=true weight=1
  IKMarkerTask RTOE: apply=true weight=1
  IKMarkerTask LTHI: apply=true weight=1
  IKMarkerTask LKNE: apply=true weight=1
  IKMarkerTask LTIB: apply=true weight=1
  IKMarkerTask LANK: apply=true weight=1
  IKMarkerTask LHEE: apply=true weight=1
  IKMarkerTask LTOE: apply=true weight=1
  IKMarkerTask CLAV: apply=true weight=1
  IKMarkerTask C7: apply=true weight=1
  IKMarkerTask T10: apply=true weight=1
  IKMarkerTask RPSI: apply=true weight=1
  IKMarkerTask LPSI: apply=true weight=1
  IKMarkerTask RHJC: apply=true weight=1
  IKMarkerTask LHJC: apply=true weight=1
  IKMarkerTask RKJC: apply=true weight=1
  IKMarkerTask LKJC: apply=true weight=1
  IKMarkerTask RAJC: apply=true weight=1
  IKMarkerTask LAJC: apply=true weight=1
